units		real
atom_style	atomic
# create domain
#lattice	type reduced density rho* = 4*(sigma/a)^3, where N=4 for fcc, s = 3.405 A (Wagner) and a = 5.25 A (Ashcroft & Mermin, p. 70)

lattice         fcc 5.405 origin 0.25 0.25 0.25
region		simRegion block 6250000 7000000 10250000 11750000 0 1000 units box
# create atoms, NOTE commented out for restart
region		mdRegion block 6624900 6625000 10749900 10750100 450 550 units box
boundary	f p p
create_box	1 mdRegion
create_atoms	1 region mdRegion
mass		1 39.95
# specify interal/ghost atoms
region		mdInternal block 6624920 6624980 10749920 10750080 450 550 units box
group		internal region mdInternal
group		ghost subtract all internal
# velocities have Vcm = 0, NOTE next four lines commented out for restart
velocity	internal create 40. 87287 mom yes loop geom
pair_style	lj/cut 13.5
pair_coeff  	1 1 .238 3.405 13.5
neighbor	5. bin
neigh_modify	every 10 delay 0 check no

#               ID  group atc PhysicsType ParameterFile
fix             AtC internal   atc thermal     Ar_thermal.mat
fix_modify      AtC boundary ghost
fix_modify      AtC time_integration fractional_step
#               ID  part keywords    nx ny nz region
fix_modify      AtC mesh create 3 6 1  simRegion f p p
# fix a temperature
fix_modify     	AtC  fix temperature all 300.
# turn on thermostat
fix_modify	AtC  control thermal rescale 10
variable xdof equal 3*count(ghost)
compute_modify thermo_temp extra ${xdof}
thermo_style custom step cpu etotal pe f_AtC[1] temp f_AtC[2]
thermo_modify  format 1 %6i format 2 %7.2g
# equilibrate MD field
#fix_modify      AtC  output bar1dfe_flux_init 100
timestep	5
thermo		10
run 		100
# change thermostat to hoover
fix_modify	AtC  unfix temperature all
fix_modify	AtC  control thermal none
fix_modify	AtC  control thermal flux interpolate
fix_modify	AtC  control localized_lambda on
#fix_modify	AtC  thermal control flux faceset obndy
fix_modify      AtC  filter type exponential
fix_modify	AtC  filter scale 10000.0
#fix_modify	AtC  filter on
# add nodesets
#               ID  mesh create_nodeset tag xmin xmax ymin ymax zmin zmax
fix_modify      AtC mesh create_nodeset tbc -INF INF 11740000 11760000 -INF INF
fix_modify      AtC mesh create_nodeset bbc -INF INF 10240000 10260000 -INF INF

# set up output, should be before a "run"
fix_modify      AtC  output bar1d_fluxFE 100 text binary
# ouput command
#dump            D1 all atom 1000 dump.bar1d
# run with FE
reset_timestep 0
thermo		100

#fix_modify      AtC  fix temperature tbc 350
#fix_modify      AtC  fix temperature bbc 300
#run 		1000
